<?xml version="1.0"?>
<!-- Rescaled AV-72 Propeller for AI-20 (~5100 HP)
     Original base: Aero-Matic AV72 (3.9 m, 2550 HP)
     Adjustments:
       - Diameter → 4.7 m
       - Power capacity ~5100 HP
       - Gear ratio tuned for ~1200 prop RPM
-->

<propeller name="prop_AV72_AI20">
  <ixx>  110.3 </ixx> <!-- approximated inertia, scaled from original -->
  <diameter unit="M">   4.7 </diameter>
  <numblades> 4 </numblades>
  <gearratio> 10.2 </gearratio> <!-- adjusted so prop ~1200 RPM -->
  <constspeed> 0 </constspeed>
  <p_factor>   0.33 </p_factor>
  <minpitch> 8 </minpitch>
  <maxpitch> 92.5 </maxpitch>
  <minrpm>   1100 </minrpm>
  <maxrpm>   1250 </maxrpm>
  <ct_factor> 2.0 </ct_factor> <!-- doubled to absorb 5100 HP -->
  <cp_factor> 2.0 </cp_factor>

  <!-- thrust coefficient as a function of advance ratio and blade angle -->
  <table name="C_THRUST" type="internal">
      <tableData>
		8	11	14	17	20	23	26	29	32	35	38	41	44	47	50	53
0		0.0678	0.1090	0.1472	0.1978	0.2490	0.3008	0.3436	0.4104	0.4742	0.4840	0.4928	0.5088	0.5132	0.5132	0.5298	0.5432
0.0858	0.0248	0.0664	0.1080	0.1594	0.2118	0.2656	0.3198	0.3798	0.4344	0.4466	0.4762	0.4966	0.5060	0.5108	0.5276	0.5402
0.1716	-0.0182	0.0238	0.0688	0.1210	0.1750	0.2302	0.2868	0.3516	0.3976	0.4306	0.4596	0.4842	0.4990	0.5084	0.5254	0.5376
0.2574	-0.0608	-0.0186	0.0296	0.0828	0.1380	0.1950	0.2536	0.3232	0.3718	0.4144	0.4432	0.4720	0.4918	0.5060	0.5232	0.5346
0.3432	-0.1036	-0.0610	-0.0096	0.0446	0.1010	0.1598	0.2206	0.2958	0.3420	0.3982	0.4266	0.4598	0.4846	0.5036	0.5212	0.5318
      </tableData>
  </table>

  <!-- power coefficient as a function of advance ratio and blade angle -->
  <table name="C_POWER" type="internal">
     <tableData>
		8	11	14	17	20	23	26	29	32	35	38	41	44	47	50	53
0		0.0578	0.0474	0.0648	0.0860	0.1086	0.1342	0.1896	0.3226	0.3974	0.4788	0.5604	0.6448	0.7366	0.8344	0.9322	1.0298
0.0858	0.0572	0.0466	0.0616	0.0812	0.0916	0.1042	0.1642	0.2996	0.3862	0.4774	0.5770	0.6770	0.7840	0.8964	1.0098	1.1264
0.1716	0.0568	0.0462	0.0582	0.0766	0.0618	0.0906	0.1498	0.2744	0.3658	0.4592	0.5674	0.6774	0.7908	0.9088	1.0286	1.1550
0.2574	0.0564	0.0456	0.0550	0.0716	0.0498	0.0832	0.1400	0.2498	0.3434	0.4362	0.5508	0.6670	0.7836	0.9038	1.0264	1.1594
0.3432	0.0558	0.0448	0.0516	0.0668	0.0412	0.0758	0.1296	0.2236	0.3186	0.4106	0.5308	0.6518	0.7712	0.8926	1.0176	1.1560
     </tableData>
  </table>

  <!-- thrust effects of helical tip Mach -->
  <table name="CT_MACH" type="internal">
    <tableData>
      0.85   1.0
      1.05   0.8
    </tableData>
  </table>

  <!-- power-required effects of helical tip Mach -->
  <table name="CP_MACH" type="internal">
    <tableData>
      0.85   1.0
      1.05   1.8
      2.00   1.4
    </tableData>
  </table>
</propeller>
